# Group assignment 5 Data sampling, transformation, multivariate random variables and CLT
# Section 1 Data Sampling
# You need testdata (virtuel measurements) for test or simulation of a flight simulator. The testdata should simulate the altitude of a plane and are supposed to be Rayleigh distributed:
# Section 2 Transformation of random variableA stochastic variable Y are given by: 𝑌 = −3 ∙ 𝑋 + 4, where 𝑋~𝒰(−1,2)
# - Determine the pdf 𝑓𝑌(𝑦), and make a draw of it together with 𝑓𝑋(𝑥).
g(x) := -3*x + 4
a_x := -1
b_x := 2
# Inverse:
ginv(y) := g(x) == y solve, x → 4/3 - y/3
# Differentiate:
gdiff := d/dx(g(x)) → -3
# Range of Y
b_y := g(-1) → 7
a_y := g(2) → -2
# New PDF of fy(y)
# Find fx(x)
f_x(x) := 1/(b_x - a_x) → 1/3
# Find fy(y)
f_y(y) := f_x(x)/|gdiff| → 1/9
# How to plot_(??)
f_y(y) :=
    if y ≥ a_y
        if y ≤ b_y
            1/9
        else
            0
    else
        0
f_x(x) :=
    if x ≥ a_x
        if x ≤ b_x
            1/3
        else
            0
    else
        0
# [plot: f_y(y), f_x(x) vs y, x]
